<?xml version="1.0"?>
<!--
  File:     Argus_As_10.xml
  Author:   Aero-Matic v 0.8

  Inputs:
    name:           Argus_As_10
    type:           piston
    power:          240.0 hp
    augmented?      no
    injected?       no
-->

<piston_engine name="Argus_As_10">
  <minmp unit="INHG">          6.0 </minmp>
  <maxmp unit="INHG">         30.0 </maxmp>
  <displacement unit="IN3"> 773.00 </displacement>
  <maxhp>        240.00 </maxhp>
  <cycles>         4.0 </cycles>
  <idlerpm>      700.0 </idlerpm>
  <maxrpm>      2500.0 </maxrpm>
  <maxthrottle>    1.0 </maxthrottle>
  <minthrottle>    0.2 </minthrottle>
  <bsfc>           0.65</bsfc>
</piston_engine>
